# Расчет NTC резистора для платы управления "ВОДОРОД" проект Бутома ЛАК ПЧ400
ACP_max := 65535
U_ACP_max := 3  # В
Uref1 := 4.05  # В
R17 := 1  # кОм
RNTC25 := 1  # кОм
i := 0 .. 20
NTC_C[i] := 0.0, 5.0, 10.0, 15.0, 20.0, 25.0, 30.0, 35.0, 40.0, 45.0, 50.0, 55.0, 60.0, 65.0, 70.0, 75.0, 80.0, 85.0, 90.0, 95.0, 100.0
NTC_KR[i] := 3.0029, 2.3773, 1.8959, 1.5207, 1.228, 1, 0.81779, 0.67341, 0.55747, 0.46357, 0.3874, 0.32368, 0.272, 0.23041, 0.19604, 0.16735, 0.14342, 0.12347, 0.10668, 0.092734, 0.0809
NTC_R[i] := NTC_KR[i]*RNTC25
U_ACP[i] := Uref1*NTC_R[i]/(R17 + NTC_R[i])
ACP[i] := ACP_max/U_ACP_max*U_ACP[i]
U_ACP[i] = [3.03823; 2.85082; 2.65147; 2.4433; 2.23223; 2.025; 1.82202; 1.62979; 1.44963; 1.28279; 1.13087; 0.990348; 0.866038; 0.758414; 0.663826; 0.580604; 0.507994; 0.445097; 0.390406; 0.3437; 0.303122]
ACP[i] = [66370.2; 62276.1; 57921.4; 53374; 48763; 44236.1; 39802; 35602.8; 31667.1; 28022.6; 24703.9; 21634.2; 18918.6; 16567.6; 14501.3; 12683.3; 11097.1; 9723.15; 8528.41; 7508.13; 6621.71]
NTC_C[i] = [0; 5; 10; 15; 20; 25; 30; 35; 40; 45; 50; 55; 60; 65; 70; 75; 80; 85; 90; 95; 100]
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